OpenVSP model (file version 5), 23 components.
Geometry view with OpenVSP parameter names; values to 6 digits, angles in degrees, lengths in the model's unit.
Overall bounding box: X_Min=0 X_Len=36.5 Y_Min=-28.8782 Y_Len=57.7565 Z_Min=-4.6 Z_Len=13.5

Pod "ForwardFuselage_APPROX"
  location (X Y Z) 0 0 -0.6, rotation 0 0 0
  bounding box size 21 8 8
  mass: Density=0 Shell_Flag=0 Mass_Area=1 Mass_Prior=0
  Design: FineRatio=5.25 Length=21

Pod "TailBoom_APPROX"
  location (X Y Z) 16.5 0 0, rotation 0 0 0
  bounding box size 20 3.2 3.2
  mass: Density=0 Shell_Flag=0 Mass_Area=1 Mass_Prior=0
  Design: FineRatio=12.5 Length=20

Pod "PusherMotorPod_APPROX"
  location (X Y Z) 17.7 0 2, rotation 0 0 0
  bounding box size 3 3 3
  mass: Density=0 Shell_Flag=0 Mass_Area=1 Mass_Prior=0
  Design: FineRatio=2 Length=3

Wing "SportWingRecon"
  location (X Y Z) 10.5 0 1, rotation 0 0 0
  symmetric about XZ
  bounding box size 7.28566 57.7565 0.765579
  mass: Density=0 Shell_Flag=0 Mass_Area=1 Mass_Prior=0
  totals: TotalSpan=57 TotalProjectedSpan=57 TotalChord=7.27946 TotalArea=414.929 TotalAR=7.83025 MAC=7.27946
  root: chord 7.27946, twist 0, airfoil file "Plan-derived folded foam-board section; see reconstruct_sport_airfoil.py"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 BaseThickChord=0.103871 ThickChord=0.103871
  sections:
    n  Span  Root_Chord  Tip_Chord  Area     Sweep  Sweep_Location  Dihedral  Twist  Twist_Location  tip airfoil
    1  28.5  7.27946     7.27946    207.465  0      0               0         0      0.25            as above
  SS_Control "Left_and_Right_Ailerons": UStart=0.06 UEnd=0.81 Length_C_Start=0.2341 Length_C_End=0.2341 Length_Start=1.70412 Length_End=1.70412 LE_Flag=0 Surf_Type=2

Wing "HorizTailEst"
  location (X Y Z) 29.5 0 0.4, rotation 0 0 0
  symmetric about XZ
  bounding box size 5.0374 18 0.400481
  mass: Density=0 Shell_Flag=0 Mass_Area=1 Mass_Prior=0
  totals: TotalSpan=18 TotalProjectedSpan=18 TotalChord=4.625 TotalArea=83.25 TotalAR=3.89189 MAC=4.63514
  root: chord 5, twist 0, NACA 4-series Camber=0 CamberLoc=0.4 ThickChord=0.08
  sections:
    n  Span  Root_Chord  Tip_Chord  Area    Sweep  Sweep_Location  Dihedral  Twist  Twist_Location  tip airfoil
    1  9     5           4.25       41.625  5      0               0         0      0.25            as above
  SS_Control "Elevator": UStart=0.05 UEnd=0.98 Length_C_Start=0.3 Length_C_End=0.3 Length_Start=1.5 Length_End=1.275 LE_Flag=0 Surf_Type=2

Wing "VertTailEst"
  location (X Y Z) 29 0 0.4, rotation 90 0 0
  bounding box size 6.46362 0.480578 8.5
  mass: Density=0 Shell_Flag=0 Mass_Area=1 Mass_Prior=0
  totals: TotalSpan=8.5 TotalProjectedSpan=8.5 TotalChord=4.25 TotalArea=36.125 TotalAR=2 MAC=4.4902
  root: chord 6, twist 0, NACA 4-series Camber=0 CamberLoc=0.4 ThickChord=0.08
  sections:
    n  Span  Root_Chord  Tip_Chord  Area    Sweep  Sweep_Location  Dihedral  Twist  Twist_Location  tip airfoil
    1  8.5   6           2.5        36.125  25     0               0         0      0.25            as above
  SS_Control "Rudder": UStart=0.08 UEnd=0.95 Length_C_Start=0.35 Length_C_End=0.35 Length_Start=2.1 Length_End=0.875 LE_Flag=0 Surf_Type=2

Blank "MASS_Airframe_Structure"
  location (X Y Z) 14.0433 0 0, rotation 0 0 0
  mass: Density=1 Shell_Flag=0 Mass_Area=1 Mass_Prior=0 PointMass=0.334 CGx=0 CGy=0 CGz=0 Ixx=0 Iyy=0 Izz=0 Ixy=0 Ixz=0 Iyz=0

Blank "MASS_Motor"
  location (X Y Z) 19.1614 0 1.9685, rotation 0 0 0
  mass: Density=1 Shell_Flag=0 Mass_Area=1 Mass_Prior=0 PointMass=0.058 CGx=0 CGy=0 CGz=0 Ixx=0 Iyy=0 Izz=0 Ixy=0 Ixz=0 Iyz=0

Blank "MASS_ESC"
  location (X Y Z) 15.2244 0 -0.393701, rotation 0 0 0
  mass: Density=1 Shell_Flag=0 Mass_Area=1 Mass_Prior=0 PointMass=0.025 CGx=0 CGy=0 CGz=0 Ixx=0 Iyy=0 Izz=0 Ixy=0 Ixz=0 Iyz=0

Blank "MASS_Aileron_Servo_L"
  location (X Y Z) 16.2087 -11.811 0.984252, rotation 0 0 0
  mass: Density=1 Shell_Flag=0 Mass_Area=1 Mass_Prior=0 PointMass=0.009 CGx=0 CGy=0 CGz=0 Ixx=0 Iyy=0 Izz=0 Ixy=0 Ixz=0 Iyz=0

Blank "MASS_Aileron_Servo_R"
  location (X Y Z) 16.2087 11.811 0.984252, rotation 0 0 0
  mass: Density=1 Shell_Flag=0 Mass_Area=1 Mass_Prior=0 PointMass=0.009 CGx=0 CGy=0 CGz=0 Ixx=0 Iyy=0 Izz=0 Ixy=0 Ixz=0 Iyz=0

Blank "MASS_Elevator_Servo"
  location (X Y Z) 17.3898 -0.787402 0, rotation 0 0 0
  mass: Density=1 Shell_Flag=0 Mass_Area=1 Mass_Prior=0 PointMass=0.009 CGx=0 CGy=0 CGz=0 Ixx=0 Iyy=0 Izz=0 Ixy=0 Ixz=0 Iyz=0

Blank "MASS_Rudder_Servo"
  location (X Y Z) 17.3898 0.787402 0, rotation 0 0 0
  mass: Density=1 Shell_Flag=0 Mass_Area=1 Mass_Prior=0 PointMass=0.009 CGx=0 CGy=0 CGz=0 Ixx=0 Iyy=0 Izz=0 Ixy=0 Ixz=0 Iyz=0

Blank "MASS_Prop_and_Adapter"
  location (X Y Z) 19.9488 0 1.9685, rotation 0 0 0
  mass: Density=1 Shell_Flag=0 Mass_Area=1 Mass_Prior=0 PointMass=0.018 CGx=0 CGy=0 CGz=0 Ixx=0 Iyy=0 Izz=0 Ixy=0 Ixz=0 Iyz=0

Blank "MASS_Receiver"
  location (X Y Z) 9.7126 0 -0.393701, rotation 0 0 0
  mass: Density=1 Shell_Flag=0 Mass_Area=1 Mass_Prior=0 PointMass=0.002 CGx=0 CGy=0 CGz=0 Ixx=0 Iyy=0 Izz=0 Ixy=0 Ixz=0 Iyz=0

Blank "MASS_Stock_Harness"
  location (X Y Z) 13.6496 0 0, rotation 0 0 0
  mass: Density=1 Shell_Flag=0 Mass_Area=1 Mass_Prior=0 PointMass=0.02 CGx=0 CGy=0 CGz=0 Ixx=0 Iyy=0 Izz=0 Ixy=0 Ixz=0 Iyz=0

Blank "MASS_Custom_PCB"
  location (X Y Z) 9.7126 0 -0.393701, rotation 0 0 0
  mass: Density=1 Shell_Flag=0 Mass_Area=1 Mass_Prior=0 PointMass=0.025 CGx=0 CGy=0 CGz=0 Ixx=0 Iyy=0 Izz=0 Ixy=0 Ixz=0 Iyz=0

Blank "MASS_GPS"
  location (X Y Z) 11.6811 0 1.9685, rotation 0 0 0
  mass: Density=1 Shell_Flag=0 Mass_Area=1 Mass_Prior=0 PointMass=0.016 CGx=0 CGy=0 CGz=0 Ixx=0 Iyy=0 Izz=0 Ixy=0 Ixz=0 Iyz=0

Blank "MASS_SiK_Radio"
  location (X Y Z) 15.2244 0 -0.393701, rotation 0 0 0
  mass: Density=1 Shell_Flag=0 Mass_Area=1 Mass_Prior=0 PointMass=0.0235 CGx=0 CGy=0 CGz=0 Ixx=0 Iyy=0 Izz=0 Ixy=0 Ixz=0 Iyz=0

Blank "MASS_Pitot_and_Line"
  location (X Y Z) 0.65748 0 0.984252, rotation 0 0 0
  mass: Density=1 Shell_Flag=0 Mass_Area=1 Mass_Prior=0 PointMass=0.012 CGx=0 CGy=0 CGz=0 Ixx=0 Iyy=0 Izz=0 Ixy=0 Ixz=0 Iyz=0

Blank "MASS_Custom_Harness"
  location (X Y Z) 12.4685 0 0, rotation 0 0 0
  mass: Density=1 Shell_Flag=0 Mass_Area=1 Mass_Prior=0 PointMass=0.015 CGx=0 CGy=0 CGz=0 Ixx=0 Iyy=0 Izz=0 Ixy=0 Ixz=0 Iyz=0

Blank "MASS_Battery_4000mAh_3S"
  location (X Y Z) 9.41457 0 -0.984252, rotation 0 0 0
  mass: Density=1 Shell_Flag=0 Mass_Area=1 Mass_Prior=0 PointMass=0.292 CGx=0 CGy=0 CGz=0 Ixx=0 Iyy=0 Izz=0 Ixy=0 Ixz=0 Iyz=0

Mesh "MeshGeom"
  location (X Y Z) 0 0 0, rotation 0 0 0
